OpenVSP model (file version 5), 3 components.
Geometry view with OpenVSP parameter names; values to 6 digits, angles in degrees, lengths in the model's unit.
Overall bounding box: X_Min=-7.29164e-08 X_Len=0.75 Y_Min=-0.746202 Y_Len=1.4924 Z_Min=-0.00600271 Z_Len=0.132804

Wing "WingGeom"
  location (X Y Z) 0 0 0, rotation 0 0 0
  symmetric about XZ
  bounding box size 0.0700001 1.4924 0.0472195
  totals: TotalSpan=1.5 TotalProjectedSpan=1.4924 TotalChord=0.06 TotalArea=0.095 TotalAR=23.4449
  root: chord 0.07, twist 0, airfoil file "RG-15 8.9%"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 BaseThickChord=0.0893399 ThickChord=0.0893399
  sections:
    n  Span  Root_Chord  Tip_Chord  Area    Sweep  Sweep_Location  Dihedral  Twist  Twist_Location  tip airfoil
    1  0.5   0.07        0.07       0.035   0      0               0         0      0.25            as above
    2  0.25  0.07        0.03       0.0125  5      0               10        0      0.25            as above

Wing "WingGeom"
  location (X Y Z) 0.65 0 0, rotation 0 0 0
  symmetric about XZ
  bounding box size 0.1 0.433013 0.132804
  totals: TotalSpan=0.5 TotalProjectedSpan=0.433013 TotalChord=0.065 TotalArea=0.0325 TotalAR=5.76923
  root: chord 0.1, twist 0, NACA 4-series Camber=0 CamberLoc=0.2 ThickChord=0.12
  sections:
    n  Span  Root_Chord  Tip_Chord  Area     Sweep  Sweep_Location  Dihedral  Twist  Twist_Location  tip airfoil
    1  0.25  0.1         0.03       0.01625  0      1               30        0      0.25            as above

Fuselage "FuselageGeom"
  location (X Y Z) -0.1 0 -0.0291667, rotation 0 0 0
  bounding box size 0.9 0.07 0.07
  Design: Length=0.9
  cross sections:
    n  XLocPercent  YLocPercent  ZLocPercent  shape
    0  0            0            0            point
    1  0.0555556    0            0            general fuselage BotStr=1 BotTanAngle=90 CornerRad=0 Height=0.07 LowStr=1 MaxWidthLoc=0 TopStr=1 TopTanAngle=90 UpStr=1 Width=0.07
    2  0.111111     0            0            general fuselage BotStr=0.83 BotTanAngle=90 CornerRad=0 Height=0.07 LowStr=0.75 MaxWidthLoc=0 TopStr=1.5 TopTanAngle=90 UpStr=1 Width=0.07
    3  0.25         0            0            as above
    4  0.45         0            0.0233333    general fuselage BotStr=1 BotTanAngle=90 CornerRad=0 Height=0.0175 LowStr=1 MaxWidthLoc=0 TopStr=1 TopTanAngle=90 UpStr=1 Width=0.02
    5  0.9          0            0.0233333    as above
    6  1            0            0.0233333    point
